// COMSOL Multiphysics 5.5.0.359 model "a5_b1_e-6.mph"
// Outline of the model tree
// Unit system: none

Parameters
  kB = 8.6173303e-5  // Boltzmann constant (eV/K)
  T = 293  // Absolute temperature (K)
  c0 = 1  // Bulk ion concentration (mol/m^3)
  F = 96485.3329  // Farady constant (As/mol)
  eps0 = 8.854187e-12  // Vacuum permittivity (F/m)
  e = 1.602e-19  // Unit charge (As)
  NA = F/e  // avogadros constant (1/mol)
  mu = 5e-8  // Ion mobility (m²/Vs)
  muS = mu/10  // Ion mobility in Stern layer (m²/Vs)
  L = 10*r_particle  // Radius of domain (m)
  a = 5e-6  // Particle radius (m)
  w = 1  // Angular frequency (rad/s)
  E0 = 1  // External field strength (V/m)
  epsW = 80  // Relative permittivity of electrolyte (-)
  epsP = 4.5  // Relative permittivity of particle (-)
  lambda = sqrt(eps0*epsW*kB*T/(2*c0*F))  // Debye length (m)
  sig = 0.01  // Total surface charge density (C/m²)
  p = 1  // Fraction of charge in Stern layer (-)
  gNad = sig/e-gNaS  // Equivalent surface site density (1/m²)
  gNaS = sig/e*p  // Surface site density Stern layer (1/m²)
  tau = a*a/(2*mu*kB*T)  // Relaxation time (s)
  ka = 2*c0*mu*F
  b = 1.0e-6
  br = pi*a/300  // Fillet radius at intersection
  vol_particle = 7.3574E-16
  r_particle = (3/4/pi*vol_particle)^(1/3)

Variables
  var1 "Variablen"
    D = mu*kB*T  // Ion diffusivity (m²/s)
    DS = muS*kB*T  // Ion diffusivity in Stern layer (m²/s)
    kappa = 1/lambda  // Debye parameter (1/m)
    sigma0 = 2*c0*mu*F  // Bulk electr. conductivity (S/m)

Selections
  sel1: Explicit "surface" on boundaries 7-44

Couplings
  genext2: GeneralExtrusion "Allgemeine Extrusion 2" on no boundaries
    dstmap = {a*sin(x), a*cos(x)}
    usesrcmap = on
    srcmap = {r, z}

Geometry
  geom1 "Geometrie 1" (2D axisymmetric, length unit m)
    r1: Rectangle "Rechteck 1" | pos = {0, -L}; size = {L, 2*L}
    c1: Circle "Kreis a" | rot = -90; r = a; angle = 180
    c2: Circle "Kreis b 1" | pos = {0, a}; rot = -90; r = b; angle = 180
    c3: Circle "Kreis b 2" | pos = {a*cos(pi/3), a*sin(pi/3)}; rot = -90; r = b
    c4: Circle "Kreis b 3" | pos = {a*cos(pi/6), a*sin(pi/6)}; rot = -90; r = b
    c5: Circle "Kreis b 4" | pos = {a, 0}; rot = -90; r = b
    mir1: Mirror "Mirror b" | input = c2, c3, c4; keep = on; axis = {0, 1}
    dif1: Difference "Difference composite" | input = r1; input2 = c1, c2, c3, c4, c5, mir1
    fil1: Fillet | point = dif1(1) points 5, 6, 9, 10, 13, 14, 17, 18, 21-24; radius = br
    r2: Rectangle "Rechteck 1.1" | pos = {0, -L}; size = {L, 2*L}
    co1: Compose | input = fil1, r2; formula = (r2-fil1)+fil1
    fin: Finalize "Form Union"

Physics
  c: CoefficientFormPDE "Stationary u0" on domains 1, 2
    dependent variable u
    cfeq1: CoefficientFormPDE "PB equation" (default)
      c = {eps0*if(dom==1,epsW,epsP)*r, 0, 0, eps0*if(dom==1,epsW,epsP)*r}
      f = -2*if(dom==1,c0,0)*F*sinh(u/(kB*T))*r
      da = 0
    zflx1: ZeroFluxBoundary "Kein Fluss 1" (default)
    init1: init "Anfangswerte 1" (default)
    dir2: DirichletBoundary "Fixed-potential BC infty" on boundaries 2, 5, 6 | r = 0
    flux1: FluxBoundary "Fixed charge BC surface" on selection sel1 | g = -gNad*e*r
  c2: CoefficientFormPDE "FD n,p,u" on all domains
    dependent variable u2 = {u21, u22, u23}
    cfeq1: CoefficientFormPDE "PNP System" (default)
      c = 
        {D*r*if(dom==1,1,0), 0, 0, D*r*if(dom==1,1,0)}
        {0, 0, 0, 0}
        {0, 0, 0, 0}
        {0, 0, 0, 0}
        {D*r*if(dom==1,1,0), 0, 0, D*r*if(dom==1,1,0)}
        {0, 0, 0, 0}
        {-mu*c0*exp(u/(kB*T))*r*if(dom==1,1,0), 0, 0, -mu*c0*exp(u/(kB*T))*r*if(dom==1,1,0)}
        {mu*c0*exp(-u/(kB*T))*r*if(dom==1,1,0), 0, 0, mu*c0*exp(-u/(kB*T))*r*if(dom==1,1,0)}
        {eps0*if(dom==1,epsW,epsP)*r, 0, 0, eps0*if(dom==1,epsW,epsP)*r}
      a = {i*w*r, 0, F*r*if(dom==1,1,0), 0, i*w*r, -F*r*if(dom==1,1,0), 0, 0, 0}
      f = {0, 0, 0}
      da = 0
      al = 
        {-mu*ur*r*if(dom==1,1,0), -mu*uz*r*if(dom==1,1,0)}
        {0, 0}
        {0, 0}
        {0, 0}
        {mu*ur*r*if(dom==1,1,0), mu*uz*r*if(dom==1,1,0)}
        {0, 0}
        {0, 0}
        {0, 0}
        {0, 0}
    zflx1: ZeroFluxBoundary "No flux" (default)
    init1: init "Initial values" (default)
    dir1: DirichletBoundary "BC top" on boundaries 5 | r = {0, 0, -E0*L}
    dir2: DirichletBoundary "BC bottom" on boundaries 2 | r = {0, 0, E0*L}
    flux1: FluxBoundary "Oscillating charge BC surface" on selection sel1 | g = {0, 0, u3*e*r}; q = 0
  cb: CoefficientFormBoundaryPDE "FD SigmaS" on selection sel1
    dependent variable u3
    cfeq1: CoefficientFormPDE "PDGL, Koeffizientenform 1" (default)
      c = {DS*r, 0, 0, DS*r}
      a = i*w*r
      f = 0
      da = 0
      ga = {-muS*gNaS*u23r*r, -muS*gNaS*u23z*r}
    init1: init "Anfangswerte 1" (default)

Mesh
  mesh1 "Netz 1"
    size: MeshSizeDefault "Größe" | hmax = L/20; hmin = pi*a/400; hauto = 3
    size1: Size "Größe 1" on selection sel1 | hmax = pi*a/400; custom = on
    ftri1: FreeTri "Freies Dreiecksnetz 1" on remaining entities
    bl1: BndLayer "Randschichten 1" on entire geometry
      blp: BndLayerProp "Randschichteigenschaften" on selection sel1 | inittype = blhmin; blhmin = lambda/2

Studies
  std1 "1. Stationary PB"
    stat: Stationary "Stationär" | solve for = {c}
  std2 "2. FD PNP"
    param: Parametric "Parametrischer Sweep" | sweeptype = filled; pname = w; plistarr = 10^{range(-2,11/299,9)}
    stat: Stationary "Stationär"
      solve for = {c2, cb}
      usesol = on
      notsolmethod = sol
      notstudy = std1
      notsol = current
      mesh = {geom1, mesh1}

Solver configurations
  sol1 "Solution 1" (study std1)
    v1: Variables "Dependent Variables 1"
    s1: Stationary "Stationary Solver 1"
      dDef: Direct
      fc1: FullyCoupled | linsolver = dDef
  sol2 "Solution 2" (study std2)
    v1: Variables "Dependent Variables 1"
    s1: Stationary "Stationary Solver 1"
      dDef: Direct
      p1: Parametric | sweeptype = filled; pname = w; plistarr = 10^{range(-2,11/299,9)}; pcontinuationmode = no
      fc1: FullyCoupled | linsolver = dDef

Datasets
  dset1: Solution | solution = none
  rev1: Revolve2D "Drehung 2D 1" | data = dset1; startangle = -90; revangle = 225
  dset3: Solution | solution = none
  rev3: Revolve2D "Drehung 2D 3" | data = dset3; startangle = -90; revangle = 225
  cln1: CutLine2D "Schnittlinie 2D 1" | data = dset3; genpoints = {{2.60293E-5, 1.201E-5}, {2.5E-5, 5.0E-5}}
  dset4: Solution | solution = sol1
  rev4: Revolve2D "Revolution 2D 4" | data = dset4; startangle = -90; revangle = 225
  dset5: Solution | solution = sol2
  rev5: Revolve2D "Revolution 2D 5" | data = dset5; startangle = -90; revangle = 225

Derived values
  int1: IntLine "sigma_eff" on boundaries 5
    data = dset5
    table = tbl1
    expr = -u23z*r*2*pi/(pi*L^2)/E0
    descr = Normalized effective conductivity
    method = integration
  int2: IntLine "surface area" on selection sel1
    data = dset4
    table = tbl2
    expr = 1
    descr = surface area
    intsurface = on
  int3: IntSurface "particle volume" on domains 1, 2
    data = dset4
    table = tbl3
    expr = 1
    descr = volume
    intvolume = on
  int4: IntLine "perimeter" on selection sel1 | data = dset4; table = tbl2; expr = 1; descr = half perimeter

Tables
  tbl1: Table "Tabelle 1"
    // sigma_eff ((dflux.u21-dflux.u22)*2*pi/(pi*L^2)/E0/(2*mu*c0))
    w | Normalized effective conductivity | Normalized effective conductivity
    0.01 | 0.998907+1.10181e-09i | 0.9989+8.09025e-10i
    0.010884 | 0.998907+1.19922e-09i | 0.9989+8.80544e-10i
    0.0118462 | 0.998907+1.30523e-09i | 0.9989+9.58386e-10i
    0.0128934 | 0.998907+1.42061e-09i | 0.9989+1.04311e-09i
    0.0140332 | 0.998907+1.5462e-09i | 0.9989+1.13532e-09i
    0.0152738 | 0.998907+1.68288e-09i | 0.9989+1.23569e-09i
    0.016624 | 0.998907+1.83165e-09i | 0.9989+1.34492e-09i
    0.0180936 | 0.998907+1.99358e-09i | 0.9989+1.46382e-09i
    0.0196931 | 0.998907+2.16981e-09i | 0.9989+1.59322e-09i
    0.021434 | 0.998907+2.36162e-09i | 0.9989+1.73406e-09i
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  tbl2: Table
    // surface area
    surface area
    5.2286e-10
  tbl3: Table
    // particle volume
    volume | volume
    7.35784e-16 | 1.10361e-12

Plots
  pg1: PlotGroup2D "2D Plot Group 1" | data = dset1
    surf1: Surface | expr = u
  pg2: PlotGroup3D "3D Plot Group 2" | data = rev1
    surf1: Surface | expr = u
  pg3: PlotGroup1D "1D Plot Group 3" | data = none
    tblp1: Table "Table Graph 1" | table = tbl1; xaxisdata = auto; imagplot = on
  pg4: PlotGroup2D "2D Plot Group 4" | data = dset4
    surf1: Surface | expr = u
  pg5: PlotGroup3D "3D Plot Group 5" | data = rev4
    surf1: Surface | expr = u
  pg6: PlotGroup2D "2D Plot Group 6" | data = dset5
    surf1: Surface | expr = u21
  pg7: PlotGroup3D "3D Plot Group 7" | data = rev5
    surf1: Surface | expr = u21
  pg8: PlotGroup2D "2D Plot Group 8" | data = dset5
    line1: Line | expr = u3