// COMSOL Multiphysics 5.5.0.359 model "random_surface_grain.mph"
// Outline of the model tree
// Unit system: none

Parameters
  kB = 8.6173303e-5  // Boltzmann constant (eV/K)
  T = 293  // Absolute temperature (K)
  c0 = 1  // Bulk ion concentration (mol/m^3)
  F = 96485.3329  // Farady constant (As/mol)
  eps0 = 8.854187e-12  // Vacuum permittivity (F/m)
  e = 1.602e-19  // Unit charge (As)
  NA = F/e  // avogadros constant (1/mol)
  mu = 5e-8  // Ion mobility (m²/Vs)
  muS = mu/10  // Ion mobility in Stern layer (m²/Vs)
  L = 10*r_particle  // Radius of domain (m)
  a = 5e-6  // Particle radius (m)
  w = 1  // Angular frequency (rad/s)
  E0 = 1  // External field strength (V/m)
  epsW = 80  // Relative permittivity of electrolyte (-)
  epsP = 4.5  // Relative permittivity of particle (-)
  lambda = sqrt(eps0*epsW*kB*T/(2*c0*F))  // Debye length (m)
  sig = 0.01  // Total surface charge density (C/m²)
  p = 0.5  // Fraction of charge in Stern layer (-)
  gNad = sig/e-gNaS  // Equivalent surface site density (1/m²)
  gNaS = sig/e*p  // Surface site density Stern layer (1/m²)
  tau = a*a/(2*mu*kB*T)  // Relaxation time (s)
  ka = 2*c0*mu*F
  N = 50  // Spatial frequency resolution
  b = 2  // Spectral exponent
  vol_particle = 5.4001E-16
  r_particle = (3/4/pi*vol_particle)^(1/3)

Functions
  rn1: Random "Gaussian Random" | funcname = g1; type = normal; seed = 3
  rn2: Random "Uniform Random" | funcname = u1; uniformrange = pi/2; seed = 3

Variables
  var1 "Variablen"
    D = mu*kB*T  // Ion diffusivity (m²/s)
    DS = muS*kB*T  // Ion diffusivity in Stern layer (m²/s)
    kappa = 1/lambda  // Debye parameter (1/m)
    sigma0 = 2*c0*mu*F  // Bulk electr. conductivity (S/m)

Selections
  sel1: Explicit "charged surface" on boundaries 7

Couplings
  genext2: GeneralExtrusion "Allgemeine Extrusion 2" on no boundaries
    dstmap = {a*sin(x), a*cos(x)}
    usesrcmap = on
    srcmap = {r, z}

Geometry
  geom1 "Geometrie 1" (2D axisymmetric, length unit m)
    r1: Rectangle "Rechteck 1" | pos = {0, -L}; size = {L, 2*L}
    c1: Circle "Kreis 1" (disabled) | rot = -90; r = a; angle = 180
    dif1: Difference "Differenz 1" (disabled) | input = r1; input2 = c1
    c2: Circle "Kreis 2" (disabled) | rot = 270; r = a; angle = 180
    pc1: ParametricCurve
      parmax = pi
      coord = {a*sin(s)*(1+0.1*sum(if((m!=0),((m^2)^(-b/2))*g1(m)*cos(m*s+u1(m)),0),m,-N,N)), a*cos(s)*(1+0.1*sum(if((m!=0),((m^2)^(-b/2))*g1(m)*cos(m*s+u1(m)),0),m,-N,N))}
    fin: Finalize "Vereinigung bilden"

Physics
  c: CoefficientFormPDE "Stationary u0" on domains 1, 2
    dependent variable u
    cfeq1: CoefficientFormPDE "PB equation" (default)
      c = {eps0*if(dom==1,epsW,epsP)*r, 0, 0, eps0*if(dom==1,epsW,epsP)*r}
      f = -2*if(dom==1,c0,0)*F*sinh(u/(kB*T))*r
      da = 0
    zflx1: ZeroFluxBoundary "Kein Fluss 1" (default)
    init1: init "Anfangswerte 1" (default)
    dir2: DirichletBoundary "Fixed-potential BC infty" on boundaries 2, 5, 6 | r = 0
    flux1: FluxBoundary "Fixed charge BC surface" on selection sel1 | g = -gNad*e*r
  c2: CoefficientFormPDE "FD n,p,u" on all domains
    dependent variable u2 = {u21, u22, u23}
    cfeq1: CoefficientFormPDE "PNP System" (default)
      c = 
        {D*r*if(dom==1,1,0), 0, 0, D*r*if(dom==1,1,0)}
        {0, 0, 0, 0}
        {0, 0, 0, 0}
        {0, 0, 0, 0}
        {D*r*if(dom==1,1,0), 0, 0, D*r*if(dom==1,1,0)}
        {0, 0, 0, 0}
        {-mu*c0*exp(u/(kB*T))*r*if(dom==1,1,0), 0, 0, -mu*c0*exp(u/(kB*T))*r*if(dom==1,1,0)}
        {mu*c0*exp(-u/(kB*T))*r*if(dom==1,1,0), 0, 0, mu*c0*exp(-u/(kB*T))*r*if(dom==1,1,0)}
        {eps0*if(dom==1,epsW,epsP)*r, 0, 0, eps0*if(dom==1,epsW,epsP)*r}
      a = {i*w*r, 0, F*r*if(dom==1,1,0), 0, i*w*r, -F*r*if(dom==1,1,0), 0, 0, 0}
      f = {0, 0, 0}
      da = 0
      al = 
        {-mu*ur*r*if(dom==1,1,0), -mu*uz*r*if(dom==1,1,0)}
        {0, 0}
        {0, 0}
        {0, 0}
        {mu*ur*r*if(dom==1,1,0), mu*uz*r*if(dom==1,1,0)}
        {0, 0}
        {0, 0}
        {0, 0}
        {0, 0}
    zflx1: ZeroFluxBoundary "No flux" (default)
    init1: init "Initial values" (default)
    dir1: DirichletBoundary "BC top" on boundaries 5 | r = {0, 0, -E0*L}
    dir2: DirichletBoundary "BC bottom" on boundaries 2 | r = {0, 0, E0*L}
    flux1: FluxBoundary "Oscillating charge BC surface" on selection sel1 | g = {0, 0, u3*e*r}; q = 0
  cb: CoefficientFormBoundaryPDE "FD SigmaS" on selection sel1
    dependent variable u3
    cfeq1: CoefficientFormPDE "PDGL, Koeffizientenform 1" (default)
      c = {DS*r, 0, 0, DS*r}
      a = i*w*r
      f = 0
      da = 0
      ga = {-muS*gNaS*u23r*r, -muS*gNaS*u23z*r}
    init1: init "Anfangswerte 1" (default)

Mesh
  mesh1 "Netz 1"
    size: MeshSizeDefault "Größe" | hmax = L/20; hmin = pi*a/400; hauto = 3
    size1: Size "Größe 1" on selection sel1 | hmax = pi*a/400; custom = on
    ftri1: FreeTri "Freies Dreiecksnetz 1" on remaining entities
    bl1: BndLayer "Randschichten 1" on domains 1, 2
      blp: BndLayerProp "Randschichteigenschaften" on selection sel1 | inittype = blhmin; blhmin = lambda/2

Studies
  std1 "1. Stationary PB"
    stat: Stationary "Stationär" | solve for = {c}
  std2 "2. FD PNP"
    param: Parametric "Parametrischer Sweep" | sweeptype = filled; pname = w; plistarr = 10^{range(-2,11/299,9)}
    stat: Stationary "Stationär"
      solve for = {c2, cb}
      usesol = on
      notsolmethod = sol
      notstudy = std1
      notsol = current
      mesh = {geom1, mesh1}

Solver configurations
  sol1 "Lösung 1" (study std1)
    v1: Variables "Dependent Variables 1"
    s1: Stationary "Stationary Solver 1"
      dDef: Direct
      fc1: FullyCoupled | linsolver = dDef
  sol2 "Solution 2" (study std2)
    v1: Variables "Dependent Variables 1"
    s1: Stationary "Stationary Solver 1"
      dDef: Direct
      p1: Parametric | sweeptype = filled; pname = w; plistarr = 10^{range(-2,11/299,9)}; pcontinuationmode = no
      fc1: FullyCoupled | linsolver = dDef

Datasets
  dset1: Solution | solution = sol1
  rev1: Revolve2D "Drehung 2D 1" | data = dset1; startangle = -90; revangle = 225
  dset3: Solution | solution = none
  rev3: Revolve2D "Drehung 2D 3" | data = dset3; startangle = -90; revangle = 225
  cln1: CutLine2D "Schnittlinie 2D 1" | data = dset3; genpoints = {{2.60293E-5, 1.201E-5}, {2.5E-5, 5.0E-5}}
  dset4: Solution | solution = sol2
  rev4: Revolve2D "Revolution 2D 4" | data = dset4; startangle = -90; revangle = 225

Derived values
  int1: IntLine "sigma_eff" on boundaries 5
    data = dset4
    table = tbl1
    expr = -u23z*r*2*pi/(pi*L^2)/E0
    descr = N 50, b 2
    method = integration
  int2: IntLine "surface area" on selection sel1
    data = dset1
    table = tbl2
    expr = 1
    descr = surface area
    intsurface = on
  int3: IntSurface "particle volume" on domains 1, 2
    data = dset1
    table = tbl3
    expr = 1
    descr = domain volume
    intvolume = on

Tables
  tbl1: Table "Tabelle 1"
    // sigma_eff ((dflux.u21-dflux.u22)*2*pi/(pi*L^2)/E0/(2*mu*c0))
    w | N 50, b 2
    0.01 | 0.998991+7.04887e-10i
    0.010884 | 0.998991+7.672e-10i
    0.0118462 | 0.998991+8.35022e-10i
    0.0128934 | 0.998991+9.0884e-10i
    0.0140332 | 0.998991+9.89183e-10i
    0.0152738 | 0.998991+1.07663e-09i
    0.016624 | 0.998991+1.1718e-09i
    0.0180936 | 0.998991+1.27539e-09i
    0.0196931 | 0.998991+1.38814e-09i
    0.021434 | 0.998991+1.51086e-09i
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  tbl2: Table
    // surface area
    surface area
    3.99446e-10
  tbl3: Table
    // particle volume
    domain volume | domain volume
    5.40014e-16 | 8.10015e-13
  tbl5: Table "Tabelle 1.1"
    // sigma_eff ((dflux.u21-dflux.u22)*2*pi/(pi*L^2)/E0/(2*mu*c0))
    omega | sphere | rough spehre, N =200, b = 1.2 | rough spehre, N =100, b = 1.0 | rough spehre, N =20, b = 1.0
    0.01 | 0.999008+7.01608e-10i | 0.998887+8.95233e-10i | 0.998818+9.53288e-10i | 0.998848+9.02166e-10i
    0.0110114 | 0.999008+7.72566e-10i | 0.998887+9.85773e-10i | 0.998818+1.0497e-09i | 0.998848+9.93408e-10i
    0.012125 | 0.999008+8.50701e-10i | 0.998887+1.08547e-09i | 0.998818+1.15586e-09i | 0.998848+1.09388e-09i
    0.0133513 | 0.999008+9.36737e-10i | 0.998887+1.19525e-09i | 0.998818+1.27276e-09i | 0.998848+1.20451e-09i
    0.0147016 | 0.999008+1.03148e-09i | 0.998887+1.31613e-09i | 0.998818+1.40148e-09i | 0.998848+1.32633e-09i
    0.0161884 | 0.999008+1.13579e-09i | 0.998887+1.44924e-09i | 0.998818+1.54322e-09i | 0.998848+1.46047e-09i
    0.0178257 | 0.999008+1.25066e-09i | 0.998887+1.59581e-09i | 0.998818+1.6993e-09i | 0.998848+1.60817e-09i
    0.0196285 | 0.999008+1.37715e-09i | 0.998887+1.75721e-09i | 0.998818+1.87116e-09i | 0.998848+1.77082e-09i
    0.0216136 | 0.999008+1.51643e-09i | 0.998887+1.93492e-09i | 0.998818+2.0604e-09i | 0.998848+1.94991e-09i
    0.0237996 | 0.999008+1.6698e-09i | 0.998887+2.13061e-09i | 0.998818+2.26878e-09i | 0.998848+2.14711e-09i
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  tbl6: Table "Tabelle 1.1.1"
    // sigma_eff ((dflux.u21-dflux.u22)*2*pi/(pi*L^2)/E0/(2*mu*c0))
    w | Kugel | raue Kugel, N =200, b = 2 | raue Kugel, N =200, b = 1.5 | raue Kugel, N =200, b = 1.2 | raue Kugel, N =100, b = 1.0 | raue Kugel, N =20, b = 1.0
    0.01 | 0.999008+7.01608e-10i | 0.998959+7.27022e-10i | 0.998933+7.61238e-10i | 0.998887+8.95233e-10i | 0.998818+9.53288e-10i | 0.998848+9.02166e-10i
    0.0110114 | 0.999008+7.72566e-10i | 0.998959+8.0055e-10i | 0.998933+8.38227e-10i | 0.998887+9.85773e-10i | 0.998818+1.0497e-09i | 0.998848+9.93408e-10i
    0.012125 | 0.999008+8.50701e-10i | 0.998959+8.81514e-10i | 0.998933+9.23002e-10i | 0.998887+1.08547e-09i | 0.998818+1.15586e-09i | 0.998848+1.09388e-09i
    0.0133513 | 0.999008+9.36737e-10i | 0.998959+9.70667e-10i | 0.998933+1.01635e-09i | 0.998887+1.19525e-09i | 0.998818+1.27276e-09i | 0.998848+1.20451e-09i
    0.0147016 | 0.999008+1.03148e-09i | 0.998959+1.06884e-09i | 0.998933+1.11914e-09i | 0.998887+1.31613e-09i | 0.998818+1.40148e-09i | 0.998848+1.32633e-09i
    0.0161884 | 0.999008+1.13579e-09i | 0.998959+1.17693e-09i | 0.998933+1.23233e-09i | 0.998887+1.44924e-09i | 0.998818+1.54322e-09i | 0.998848+1.46047e-09i
    0.0178257 | 0.999008+1.25066e-09i | 0.998959+1.29596e-09i | 0.998933+1.35696e-09i | 0.998887+1.59581e-09i | 0.998818+1.6993e-09i | 0.998848+1.60817e-09i
    0.0196285 | 0.999008+1.37715e-09i | 0.998959+1.42703e-09i | 0.998933+1.4942e-09i | 0.998887+1.75721e-09i | 0.998818+1.87116e-09i | 0.998848+1.77082e-09i
    0.0216136 | 0.999008+1.51643e-09i | 0.998959+1.57136e-09i | 0.998933+1.64531e-09i | 0.998887+1.93492e-09i | 0.998818+2.0604e-09i | 0.998848+1.94991e-09i
    0.0237996 | 0.999008+1.6698e-09i | 0.998959+1.73028e-09i | 0.998933+1.81171e-09i | 0.998887+2.13061e-09i | 0.998818+2.26878e-09i | 0.998848+2.14711e-09i
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  tbl7: Table "N 50, b 1"
    // sigma_eff ((dflux.u21-dflux.u22)*2*pi/(pi*L^2)/E0/(2*mu*c0))
    w | N 50, b 1
    0.01 | 0.998833+9.64457e-10i
    0.010884 | 0.998833+1.04972e-09i
    0.0118462 | 0.998833+1.14251e-09i
    0.0128934 | 0.998833+1.24351e-09i
    0.0140332 | 0.998833+1.35344e-09i
    0.0152738 | 0.998833+1.47309e-09i
    0.016624 | 0.998833+1.60331e-09i
    0.0180936 | 0.998833+1.74505e-09i
    0.0196931 | 0.998833+1.89931e-09i
    0.021434 | 0.998833+2.06722e-09i
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  tbl8: Table "N 50, b1.25"
    // sigma_eff ((dflux.u21-dflux.u22)*2*pi/(pi*L^2)/E0/(2*mu*c0))
    w | N 50, b 1.25
    0.01 | 0.998903+8.05518e-10i
    0.010884 | 0.998903+8.76728e-10i
    0.0118462 | 0.998903+9.54232e-10i
    0.0128934 | 0.998903+1.03859e-09i
    0.0140332 | 0.998903+1.1304e-09i
    0.0152738 | 0.998903+1.23033e-09i
    0.016624 | 0.998903+1.33909e-09i
    0.0180936 | 0.998903+1.45747e-09i
    0.0196931 | 0.998903+1.58632e-09i
    0.021434 | 0.998903+1.72655e-09i
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  tbl9: Table "N 50, b 1.5"
    // sigma_eff ((dflux.u21-dflux.u22)*2*pi/(pi*L^2)/E0/(2*mu*c0))
    w | N 50, b 1.5
    0.01 | 0.998933+7.55687e-10i
    0.010884 | 0.998933+8.22491e-10i
    0.0118462 | 0.998933+8.95201e-10i
    0.0128934 | 0.998933+9.74339e-10i
    0.0140332 | 0.998933+1.06047e-09i
    0.0152738 | 0.998933+1.15422e-09i
    0.016624 | 0.998933+1.25625e-09i
    0.0180936 | 0.998933+1.36731e-09i
    0.0196931 | 0.998933+1.48818e-09i
    0.021434 | 0.998933+1.61974e-09i
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  tbl10: Table "N 50, b 1.75"
    // sigma_eff ((dflux.u21-dflux.u22)*2*pi/(pi*L^2)/E0/(2*mu*c0))
    w | N 50, b 1.75
    0.01 | 0.998949+7.36299e-10i
    0.010884 | 0.998949+8.0139e-10i
    0.0118462 | 0.998949+8.72234e-10i
    0.0128934 | 0.998949+9.49341e-10i
    0.0140332 | 0.998949+1.03326e-09i
    0.0152738 | 0.998949+1.12461e-09i
    0.016624 | 0.998949+1.22402e-09i
    0.0180936 | 0.998949+1.33223e-09i
    0.0196931 | 0.998949+1.45e-09i
    0.021434 | 0.998949+1.57819e-09i
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  tbl11: Table "N 50, b 2"
    // sigma_eff ((dflux.u21-dflux.u22)*2*pi/(pi*L^2)/E0/(2*mu*c0))
    w | N 50, b 2
    0.01 | 0.998959+7.26962e-10i
    0.010884 | 0.998959+7.91227e-10i
    0.0118462 | 0.998959+8.61173e-10i
    0.0128934 | 0.998959+9.37303e-10i
    0.0140332 | 0.998959+1.02016e-09i
    0.0152738 | 0.998959+1.11035e-09i
    0.016624 | 0.998959+1.2085e-09i
    0.0180936 | 0.998959+1.31534e-09i
    0.0196931 | 0.998959+1.43161e-09i
    0.021434 | 0.998959+1.55817e-09i
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  tbl12: Table "Tabelle 1.2"
    // sigma_eff ((dflux.u21-dflux.u22)*2*pi/(pi*L^2)/E0/(2*mu*c0))
    w | N 50, b 1 | N 50, b 1.25 | N 50, b 1.5 | N 50, b 1.75 | N 50, b 2
    0.01 | 0.998833+9.64457e-10i | 0.998903+8.05518e-10i | 0.998933+7.55687e-10i | 0.998949+7.36299e-10i | 0.998959+7.26962e-10i
    0.010884 | 0.998833+1.04972e-09i | 0.998903+8.76728e-10i | 0.998933+8.22491e-10i | 0.998949+8.0139e-10i | 0.998959+7.91227e-10i
    0.0118462 | 0.998833+1.14251e-09i | 0.998903+9.54232e-10i | 0.998933+8.95201e-10i | 0.998949+8.72234e-10i | 0.998959+8.61173e-10i
    0.0128934 | 0.998833+1.24351e-09i | 0.998903+1.03859e-09i | 0.998933+9.74339e-10i | 0.998949+9.49341e-10i | 0.998959+9.37303e-10i
    0.0140332 | 0.998833+1.35344e-09i | 0.998903+1.1304e-09i | 0.998933+1.06047e-09i | 0.998949+1.03326e-09i | 0.998959+1.02016e-09i
    0.0152738 | 0.998833+1.47309e-09i | 0.998903+1.23033e-09i | 0.998933+1.15422e-09i | 0.998949+1.12461e-09i | 0.998959+1.11035e-09i
    0.016624 | 0.998833+1.60331e-09i | 0.998903+1.33909e-09i | 0.998933+1.25625e-09i | 0.998949+1.22402e-09i | 0.998959+1.2085e-09i
    0.0180936 | 0.998833+1.74505e-09i | 0.998903+1.45747e-09i | 0.998933+1.36731e-09i | 0.998949+1.33223e-09i | 0.998959+1.31534e-09i
    0.0196931 | 0.998833+1.89931e-09i | 0.998903+1.58632e-09i | 0.998933+1.48818e-09i | 0.998949+1.45e-09i | 0.998959+1.43161e-09i
    0.021434 | 0.998833+2.06722e-09i | 0.998903+1.72655e-09i | 0.998933+1.61974e-09i | 0.998949+1.57819e-09i | 0.998959+1.55817e-09i
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  tbl13: Table "Tabelle 1.3"
    // sigma_eff ((dflux.u21-dflux.u22)*2*pi/(pi*L^2)/E0/(2*mu*c0))
    w | N 50, b 1
    0.01 | 0.998916+8.97961e-10i
    0.010884 | 0.998916+9.77342e-10i
    0.0118462 | 0.998916+1.06374e-09i
    0.0128934 | 0.998916+1.15778e-09i
    0.0140332 | 0.998916+1.26013e-09i
    0.0152738 | 0.998916+1.37152e-09i
    0.016624 | 0.998916+1.49277e-09i
    0.0180936 | 0.998916+1.62473e-09i
    0.0196931 | 0.998916+1.76836e-09i
    0.021434 | 0.998916+1.92469e-09i
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
Plots
  pg1: PlotGroup2D "2D Plot Group 1" | data = dset1
    surf1: Surface | expr = u
  pg2: PlotGroup3D "3D Plot Group 2" | data = rev1
    surf1: Surface | expr = u
  pg3: PlotGroup1D "1D Plot Group 3" | data = none
    tblp1: Table "Table Graph 1" | table = tbl1; xaxisdata = auto; imagplot = on
  pg4: PlotGroup1D "1D Plot Group 4" | data = none
    tblp1: Table "Table Graph 1"
      table = tbl5
      xaxisdata = auto
      imagplot = on
      legends = {"sphere, Imaginary part", "rough spehre, N =200, b = 1.2", "rough spehre, N =100, b = 1.0", "rough spehre, N =20, b = 1.0"}
  pg5: PlotGroup2D "2D Plot Group 5" | data = dset4
    surf1: Surface | expr = u21
  pg6: PlotGroup3D "3D Plot Group 6" | data = rev4
    surf1: Surface | expr = u21
  pg7: PlotGroup2D "2D Plot Group 7" | data = dset4
    line1: Line | expr = u3
  pg8: PlotGroup1D "1D Plot Group 8" | data = none
    tblp1: Table "Table Graph 1" | table = tbl3